# OpenSim document version 40000
Model:
  PathPoint StartPoint: humerus (0.008 0 0.007000001)
  PathPoint EndPoint: clavicle
  Ground
  BodySet:
    Body scapula: mass=0.0003 [kg] mass_center=(0.0108 0.0011 0.0115) inertia=(3e-5 3e-5 3e-5 0 0 0)
        meshes=GeomJan01242023\Bones_Scapula.stl
    Body humerus: mass=0.001258765 mass_center=(0.0058 0.0007 0.0108) inertia=(1.3e-6 1.3e-6 1.3e-5 0 0 0)
        meshes=GeomJan01242023\Bone_Segmentation_Humerus.stl
      WrapCylinder shoulder_wrap: xyz_body_rotation=(1.04793 -1.490116e-8 0)
          translation=(0.008446729 0.001467278 0.01217744) quadrant=all radius=0.0006 length=0.0025
      WrapCylinder elbow: xyz_body_rotation=(1.04793 -1.490116e-8 0)
          translation=(0.003379988 -0.0001428681 0.008919581) quadrant=all radius=0.0006 length=0.0015
    Body ulna: mass=0.000712725 mass_center=(-0.0003000002 0.001000001 0.009900003) inertia=(7e-7 7e-7 7e-7 0 0 0)
        meshes=GeomJan01242023\Bone_Segments_Ulna.stl
    Body hand: mass=0.0007259 mass_center=(-0.0048 0.0019 0.012) inertia=(7.3e-6 7.3e-6 7.3e-6 0 0 0)
        meshes=GeomJan01242023\Bone_Segments_Hand.stl
    Body radius: mass=0.00053125 mass_center=(-0.0003 0.0014 0.0103) inertia=(5.3e-6 5.3e-6 5.31e-5 0 0 0)
        meshes=GeomJan01242023\Bone_Segments_Radius.stl
    Body clavicle: mass=0.00035326 mass_center=(0 0 0) inertia=(3.53e-5 3.53e-5 3.53e-5 0 0 0)
        meshes=GeomJan01242023\Bone_Segmentation_Segment_8.stl
  JointSet:
    WeldJoint ground_scapula: socket_parent_frame=ground_offset socket_child_frame=scapula_offset
      PhysicalOffsetFrame ground_offset: socket_parent=/ground orientation=(0.5235988 3.141593 0) [radians]
      PhysicalOffsetFrame scapula_offset: socket_parent=/bodyset/scapula orientation=(0 1.570796 0)
    CustomJoint shoulder: socket_parent_frame=scapula_offset socket_child_frame=humerus_offset
      Coordinate elv_angle: default_value=0.01403245 range=(-0.713623 1.357939) clamped=true
      Coordinate extension_angle: default_value=-0.02403318 range=(-1.658063 1.8) clamped=true
      PhysicalOffsetFrame scapula_offset: socket_parent=/bodyset/scapula
          translation=(0.008380613 0.0008546648 0.01192522) [meters]
      PhysicalOffsetFrame humerus_offset: socket_parent=/bodyset/humerus
          translation=(0.00836704 0.0006335447 0.01196758) orientation=(0 -0.5235988 0)
      SpatialTransform: axes_held_at_zero=rotation3
        TransformAxis rotation1: coordinates=elv_angle axis=(0.0043 0.04740001 0.9990892)
            LinearFunction(coefficients=1 0)
        TransformAxis rotation2: coordinates=extension_angle axis=(-0.0048 0.9990892 -0.04240001)
            LinearFunction(coefficients=1 0)
        TransformAxis translation1: axis=(1 0 0)
        TransformAxis translation2: axis=(0 1 0)
        TransformAxis translation3: axis=(0 0 1)
    PinJoint humerus_ulna: socket_parent_frame=humerus_offset socket_child_frame=ulna_offset
      Coordinate elbow_flex: default_value=-1.110954 range=(-2.622933 -0.495778) clamped=true
      PhysicalOffsetFrame humerus_offset: socket_parent=/bodyset/humerus
          translation=(0.00302514 5.696451e-5 0.008765793) orientation=(1.570796 0 0)
      PhysicalOffsetFrame ulna_offset: socket_parent=/bodyset/ulna translation=(0.0031 -0.0001 0.0086)
          orientation=(1.570796 -0.1396263 -0.9774367)
    CustomJoint wrist: socket_parent_frame=radius_offset socket_child_frame=hand_offset
      Coordinate wrist_angle: default_value=-0.3478267 range=(-0.4 0.4) clamped=true
      PhysicalOffsetFrame radius_offset: socket_parent=/bodyset/radius
          translation=(-0.003899276 0.001164887 0.01138784)
      PhysicalOffsetFrame hand_offset: socket_parent=/bodyset/hand translation=(-0.003899 0.001165 0.011388)
      SpatialTransform: axes_held_at_zero=(rotation2 rotation3)
        TransformAxis rotation1: coordinates=wrist_angle axis=(0.0048 0.9990892 0.04240001)
            LinearFunction(coefficients=1 0)
        TransformAxis translation1: axis=(1 0 0)
        TransformAxis translation2: axis=(0 1 0)
        TransformAxis translation3: axis=(0 0 1)
    PinJoint ulna_radius_pj: socket_parent_frame=ulna_offset socket_child_frame=radius_offset
      Coordinate radius_rot: default_value=0.03476696 range=(-0.6 0.19998) clamped=true
      PhysicalOffsetFrame ulna_offset: socket_parent=/bodyset/ulna translation=(0.002996743 -0.0003109228 0.009120254)
          orientation=(-0.5236686 1.919862 0)
      PhysicalOffsetFrame radius_offset: socket_parent=/bodyset/radius translation=(0.003 -0.0001 0.009)
          orientation=(-0.5235988 1.919862 0)
    WeldJoint ground_clavicle: socket_parent_frame=/jointset/shoulder/scapula_offset socket_child_frame=clavicle_offset
      PhysicalOffsetFrame ground_offset: socket_parent=/ground
      PhysicalOffsetFrame clavicle_offset: socket_parent=/bodyset/clavicle
          translation=(0.007807423 0.001070782 0.01164855)
  ForceSet:
    DeGrooteFregly2016Muscle [values shared by the 16 below unless stated]: min_control=0.01 max_control=1
        ignore_tendon_compliance=true ignore_passive_fiber_force=true
    DeGrooteFregly2016Muscle Pectoralis_Clavicle_Head: max_isometric_force=0.8 optimal_fiber_length=0.004
        tendon_slack_length=2e-5 pennation_angle_at_optimal=0 [radians] max_contraction_velocity=10
      PathPoint Pec_Insertion: humerus (0.0081 0.0006000002 0.0125)
      PathPoint Pec_Midpoint_01: clavicle (0.009500006 0.0003000002 0.0134)
      PathPoint Pec_Origin_Clav: clavicle (0.0114 -0.0007 0.0133)
    DeGrooteFregly2016Muscle Biceps_Short_Head: max_isometric_force=2 optimal_fiber_length=0.011
        tendon_slack_length=2e-5 pennation_angle_at_optimal=0.1204444 max_contraction_velocity=100
        activation_time_constant=0.015 deactivation_time_constant=0.06
      PathPoint Biceps_Short_Head_Insertion: ulna (0.002061821 9.756112e-5 0.008827484)
      PathPoint P2: humerus (0.005457445 0.001002675 0.01151327)
      PathPoint P3: humerus (0.008543091 0.001736577 0.01275594)
      PathPoint P4: humerus (0.00912379 0.001453967 0.01223746)
      PathWrap shoulder_wrap_BICs: wrap_object=shoulder_wrap method=hybrid
      PathWrap elbow_wrap_BICs: wrap_object=elbow method=hybrid
    DeGrooteFregly2016Muscle Biceps_Long_Head: max_isometric_force=2.5 optimal_fiber_length=0.008
        tendon_slack_length=2e-5 pennation_angle_at_optimal=0.1570556 max_contraction_velocity=10
        activation_time_constant=0.015 deactivation_time_constant=0.06
      PathPoint P1: ulna (0.001988256 7.975793e-5 0.00880254)
      PathPoint P2: humerus (0.005353014 0.0009224681 0.01151205)
      PathPoint P3: scapula (0.008921897 0.002034608 0.01255023)
      PathWrap shoulder_wrap: wrap_object=shoulder_wrap method=hybrid
      PathWrap elbow_wrap: wrap_object=elbow method=hybrid
    DeGrooteFregly2016Muscle Deltoid_A: max_isometric_force=0.2 optimal_fiber_length=0.006 tendon_slack_length=2e-6
      PathPoint Deltoid_A_Insertion: humerus (0.005499999 0.0012 0.0115)
      PathPoint P2: clavicle (0.0073 0.0014 0.01315087)
      PathPoint Deltoid_A_Origin: clavicle (0.0093 0.0005 0.0133)
    DeGrooteFregly2016Muscle Triceps_Short_Head: max_isometric_force=1.4 optimal_fiber_length=0.007
        tendon_slack_length=1e-5 pennation_angle_at_optimal=0.1685
      PathPoint Triceps_Short_Head_Insertion: ulna (0.004262974 -0.0003513579 0.008067771)
      PathPoint Triceps_Short_Head_Origin: humerus (0.0083 0.0008000006 0.01150001)
    DeGrooteFregly2016Muscle Triceps_Long_Head: max_isometric_force=3.4 optimal_fiber_length=0.009
        tendon_slack_length=0.0002 pennation_angle_at_optimal=0.2326667
      PathPoint Triceps_Long_Head_Insertion: ulna (0.004194979 -0.0005704098 0.007977514)
      PathPoint P2: clavicle (0.007186572 0.0004696331 0.01068403)
      PathPoint Triceps_Long_Head_Origin: scapula (0.009760385 0.001174116 0.01157653)
    DeGrooteFregly2016Muscle MaybeBrachialis_InnerHead: max_isometric_force=0.36 optimal_fiber_length=0.007
        tendon_slack_length=1e-5
      PathPoint P1: radius (0.0025 0.0003 0.008900001)
      PathPoint P2: humerus (0.005000001 0.0007 0.009800001)
      PathPoint P3: humerus (0.005800004 0.0002 0.01050001)
      PathPoint P4: humerus (0.0079 0.0008 0.0126)
      PathWrap elbow_wrap: wrap_object=elbow method=hybrid
    DeGrooteFregly2016Muscle MaybeBrachialis_OuterrHead: max_isometric_force=0.42 optimal_fiber_length=0.007
        tendon_slack_length=1e-5
      PathPoint P1: radius (0.0025 0.0003 0.0089)
      PathPoint P2: humerus (0.005 0.0007 0.0098)
      PathPoint P3: humerus (0.008200002 0.001 0.0117)
      PathWrap elbow_wrap: wrap_object=elbow method=hybrid
    DeGrooteFregly2016Muscle Anconeus: max_isometric_force=0.2 optimal_fiber_length=0.003 tendon_slack_length=0.0002
        max_contraction_velocity=10 fiber_damping=0
      PathPoint Anconeus_Origin: humerus (0.0052 0.0005 0.0107)
      PathPoint Insertion: ulna (0.0024 -0.0002 0.008800003)
      PathWrap elbow_wrap: wrap_object=elbow method=hybrid
    DeGrooteFregly2016Muscle Deltoid_M: max_control=0.1 max_isometric_force=0.2 optimal_fiber_length=0.004
        tendon_slack_length=1e-6 max_contraction_velocity=10
      PathPoint Deltoid_M_Insertion: humerus (0.005745785 0.001425906 0.01166542)
      PathPoint Deltoid_M_Origin: scapula (0.008500001 0.0023 0.012)
      PathWrap shoulder_wrap: wrap_object=shoulder_wrap method=axial
    DeGrooteFregly2016Muscle Short_Anconeus: max_isometric_force=0.2 optimal_fiber_length=0.001
        tendon_slack_length=1e-6 max_contraction_velocity=100
      PathPoint Short_Anconeus_Insertion: ulna (0.0038 -0.0005999999 0.0083)
      PathPoint Short_Anconeus_Origin: humerus (0.0036 -0.0009 0.009099999)
    DeGrooteFregly2016Muscle Subscapularis_SuperiorHead: max_isometric_force=0.2 optimal_fiber_length=0.003
        tendon_slack_length=0.0001
      PathPoint Subscapularis_SuperiorHead_Insertion: humerus (0.008599999 0.0005 0.0118)
      PathPoint Subscapularis_SuperiorHead_Origin: scapula (0.0133 0.0004 0.0129)
    DeGrooteFregly2016Muscle Infraspinatus: max_isometric_force=0.2 optimal_fiber_length=0.003 tendon_slack_length=1e-5
      PathPoint Infraspinatus_Insertion: humerus (0.0083 0.0016 0.0119)
      PathPoint Infraspinatus_P1: scapula (0.008999999 0.0018 0.0118)
      PathPoint Infraspinatus_Origin: scapula (0.0106 0.0013 0.0116)
      PathWrap shoulder_wrap: wrap_object=shoulder_wrap method=hybrid
    DeGrooteFregly2016Muscle PronatorTeres: min_control=0 max_isometric_force=0.2 optimal_fiber_length=0.007
        tendon_slack_length=1e-10
      PathPoint P1: radius (0.0008755011 0.001185328 0.01005015)
      PathPoint P2: humerus (0.003569195 -0.0006697322 0.009269772)
    DeGrooteFregly2016Muscle FlexorCarpiRadialis: min_control=0 max_isometric_force=0.2 optimal_fiber_length=0.007
        tendon_slack_length=1e-11
      PathPoint P1: hand (-0.004015558 0.001582127 0.01173778)
      PathPoint P2: radius (0.000395003 0.001372634 0.01020844)
      PathPoint P3: humerus (0.003424911 -0.0009275107 0.009228797)
    DeGrooteFregly2016Muscle Brachioradialis: min_control=0 max_isometric_force=0.2 optimal_fiber_length=0.007
        tendon_slack_length=1e-7
      PathPoint P1: radius (-0.002927806 0.001266207 0.01163722)
      PathPoint P2: humerus (0.004030141 0.0006478052 0.00905989)
  MarkerSet:
    Marker handm: hand (-0.004515804 0.001940404 0.01233551) fixed=true
    Marker allignment: ground (0.04930044 0.0002491577 -0.006381736)
    Marker elbow_target: ground (0.04735331 -0.002113636 -0.008341094)
    Marker elbow: humerus (0.002890574 -0.0001060539 0.008397066)
    Marker shoulderm: scapula (0.007632216 0.001291292 0.01179705)
